!!! Solve the issue

/solu
antype,0

prefix='CompStat'

! Condition 1. Dead load
time,1
nlgeom,on                       !!! Switch on the none linear function
sstif,on
esel,all
acel,,9.8,,
allsel,all
solve

!!! ------------------Export results-------------------
/input, 'output_images', 'mac', 'C:\Users\xuhui\Desktop\JiashaoBridge\model'
